# OpenSim document version 40000
AnalyzeTool FAILTCRT01_SDP01_ik:
  model_file: C:\Users\Owner\Documents\projects\force-moco\mrs\test1-sdp\FAILTCRT01.osim
  replace_force_set: false
  results_directory: C:\Users\Owner\Documents\projects\force-moco\mrs\test1-sdp\test-out\MuscleAnalysis
  output_precision: 8
  initial_time: 1.06
  final_time: 2.92
  solve_for_equilibrium_for_auxiliary_states: false
  maximum_number_of_integrator_steps: 20000
  maximum_integrator_step_size: 1
  minimum_integrator_step_size: 1e-8
  integrator_error_tolerance: 1e-5
  coordinates_file: C:\Users\Owner\Documents\projects\force-moco\mrs\test1-sdp\FAILTCRT01_SDP01_ik.mot
  lowpass_cutoff_frequency_for_coordinates: -1
  AnalysisSet Analyses:
    MuscleAnalysis: start_time=1.06 end_time=2.92 step_interval=1 in_degrees=true muscle_list=all
        moment_arm_coordinate_list=(ankle_angle_r knee_angle_r hip_flexion_r hip_adduction_r hip_rotation_r ankle_angle_l knee_angle_l hip_flexion_l hip_adduction_l hip_rotation_l)
        compute_moments=true
