# OpenSim document version 40000
AnalyzeTool PFOA1_COND1_TRIAL6_ik:
  model_file: C:\Users\Owner\Documents\projects\force-moco\mrs\test2-walk\PFOA1.osim
  replace_force_set: false
  results_directory: C:\Users\Owner\Documents\projects\force-moco\mrs\test2-walk\test-out\MuscleAnalysis
  output_precision: 8
  initial_time: 0.05353535
  final_time: 1.006465
  solve_for_equilibrium_for_auxiliary_states: false
  maximum_number_of_integrator_steps: 20000
  maximum_integrator_step_size: 1
  minimum_integrator_step_size: 1e-8
  integrator_error_tolerance: 1e-5
  coordinates_file: C:\Users\Owner\Documents\projects\force-moco\mrs\test2-walk\PFOA1_COND1_TRIAL6_ik.mot
  lowpass_cutoff_frequency_for_coordinates: -1
  AnalysisSet Analyses:
    MuscleAnalysis: start_time=0.05353535 end_time=1.006465 step_interval=1 in_degrees=true muscle_list=all
        moment_arm_coordinate_list=(ankle_angle_r knee_angle_r hip_flexion_r hip_adduction_r hip_rotation_r)
        compute_moments=true
