# OpenSim document version 40000
ForceSet Rajagopal_RRA_Actuators:
  PointActuator FX: body=pelvis point=(-0.0699009 0 0) direction=(1 0 0) optimal_force=1
  PointActuator FY: body=pelvis point=(-0.0699009 0 0) direction=(0 1 0) optimal_force=1
  PointActuator FZ: body=pelvis point=(-0.0699009 0 0) direction=(0 0 1) optimal_force=1
  TorqueActuator MX: bodyA=pelvis bodyB=ground axis=(1 0 0) optimal_force=1
  TorqueActuator MY: bodyA=pelvis bodyB=ground axis=(0 1 0) optimal_force=1
  TorqueActuator MZ: bodyA=pelvis bodyB=ground axis=(0 0 1) optimal_force=1
  CoordinateActuator [values shared by the 10 below unless stated]: optimal_force=1000 min_control=-1 max_control=1
  CoordinateActuator hip_flexion_r: coordinate=hip_flexion_r
  CoordinateActuator hip_adduction_r: coordinate=hip_adduction_r
  CoordinateActuator hip_rotation_r: coordinate=hip_rotation_r
  CoordinateActuator knee_angle_r: coordinate=knee_angle_r
  CoordinateActuator ankle_angle_r: coordinate=ankle_angle_r
  CoordinateActuator hip_flexion_l: coordinate=hip_flexion_l
  CoordinateActuator hip_adduction_l: coordinate=hip_adduction_l
  CoordinateActuator hip_rotation_l: coordinate=hip_rotation_l
  CoordinateActuator knee_angle_l: coordinate=knee_angle_l
  CoordinateActuator ankle_angle_l: coordinate=ankle_angle_l
