# OpenSim document version 30000
ForceSet Rajagopal_Reserve_Actuators:
  defaults: CoordinateActuator default: optimal_force=100
  # RESIDUAL ACTUATORS
  PointActuator FX: body=pelvis point=(-0.073 -0.02525 0) direction=(1 0 0) optimal_force=10
  PointActuator FY: body=pelvis point=(-0.073 -0.02525 0) direction=(0 1 0) optimal_force=10
  PointActuator FZ: body=pelvis point=(-0.073 -0.02525 0) direction=(0 0 1) optimal_force=10
  TorqueActuator MX: bodyA=pelvis bodyB=ground axis=(1 0 0) optimal_force=15
  TorqueActuator MY: bodyA=pelvis bodyB=ground axis=(0 1 0) optimal_force=15
  TorqueActuator MZ: bodyA=pelvis bodyB=ground axis=(0 0 1) optimal_force=15
  # LOWER BODY RESERVE ACTUATORS
  CoordinateActuator reserve_hip_flexion_r: coordinate=hip_flexion_r optimal_force=2.5
  CoordinateActuator reserve_hip_adduction_r: coordinate=hip_adduction_r optimal_force=5
  CoordinateActuator reserve_hip_rotation_r: coordinate=hip_rotation_r optimal_force=10
  CoordinateActuator reserve_knee_angle_r: coordinate=knee_angle_r optimal_force=1
  CoordinateActuator reserve_subtalar_angle_r: coordinate=subtalar_angle_r optimal_force=1
  CoordinateActuator reserve_ankle_angle_r: coordinate=ankle_angle_r optimal_force=1
  CoordinateActuator reserve_hip_flexion_l: coordinate=hip_flexion_l optimal_force=2.5
  CoordinateActuator reserve_hip_adduction_l: coordinate=hip_adduction_l optimal_force=5
  CoordinateActuator reserve_hip_rotation_l: coordinate=hip_rotation_l optimal_force=10
  CoordinateActuator reserve_knee_angle_l: coordinate=knee_angle_l optimal_force=1
  CoordinateActuator reserve_subtalar_angle_l: coordinate=subtalar_angle_l optimal_force=1
  CoordinateActuator reserve_ankle_angle_l: coordinate=ankle_angle_l optimal_force=1
  # UPPER BODY ACTUATORS
  CoordinateActuator lumbar_ext: coordinate=lumbar_extension optimal_force=10
  CoordinateActuator lumbar_bend: coordinate=lumbar_bending optimal_force=10
  CoordinateActuator lumbar_rot: coordinate=lumbar_rotation optimal_force=10
  CoordinateActuator shoulder_flex_r: coordinate=arm_flex_r optimal_force=10
  CoordinateActuator shoulder_add_r: coordinate=arm_add_r optimal_force=10
  CoordinateActuator shoulder_rot_r: coordinate=arm_rot_r optimal_force=10
  CoordinateActuator elbow_flex_r: coordinate=elbow_flex_r optimal_force=10
  CoordinateActuator pro_sup_r: coordinate=pro_sup_r optimal_force=10
  CoordinateActuator wrist_flex_r: coordinate=wrist_flex_r optimal_force=10
  CoordinateActuator wrist_dev_r: coordinate=wrist_dev_r optimal_force=10
  CoordinateActuator shoulder_flex_l: coordinate=arm_flex_l optimal_force=10
  CoordinateActuator shoulder_add_l: coordinate=arm_add_l optimal_force=10
  CoordinateActuator shoulder_rot_l: coordinate=arm_rot_l optimal_force=10
  CoordinateActuator elbow_flex_l: coordinate=elbow_flex_l optimal_force=10
  CoordinateActuator pro_sup_l: coordinate=pro_sup_l optimal_force=10
  CoordinateActuator wrist_flex_l: coordinate=wrist_flex_l optimal_force=10
  CoordinateActuator wrist_dev_l: coordinate=wrist_dev_l optimal_force=10
